// SBML level 2 version 1
// Created on: 2/18/2019 3:11:44 PM
// Model Starts Here

model brusselator()
  // The Brusselator

  // Compartments:
  compartment compartment = 1;

  // Species:
  species X in compartment = 3;
  species Y in compartment = 3;
  species $A in compartment = 0.5;
  species $B in compartment = 3;
  species $D in compartment = 0;
  species $E in compartment = 0;

  // Parameters:
  J0_k_1 = 1;
  J1_k_2 = 1;
  J2_k_3 = 1;
  J3_k_4 = 1;

  // Reactions:
  J0: $A => X; J0_k_1*A;
  J1: 2 X + Y => 3 X; J1_k_2*X*X*Y;
  J2: X + $B => Y + $D; J2_k_3*X*B;
  J3: X => $E; J3_k_4*X;
end
